<?xml version="1.0"?>
<!--
  Author:   Jon Berndt
  Date:     18 August 2002
  Function: F-15 autopilot test file

  Note: this file represents a test only of the new autopilot
        setup in JSBSim. The same components used in the FCS
        can also be used in the autopilot section. There are
        some new FCS input and output identifiers directly
        related to the autopilot:

          ap/elevator_cmd,
          ap/aileron_cmd,
          ap/attitude_hold,
          ap/altitude_hold,
          ap/heading_hold,
          ap/altitude_setpoint,
          ap/heading_setpoint
-->
<autopilot name="F15 Autopilot">

    <!-- INTERFACE PROPERTIES -->
    <property> ap/attitude_hold     </property>
    <property> ap/altitude_hold     </property>
    <property> ap/heading_hold      </property>
    <property> ap/altitude_setpoint </property>
    <property> ap/heading_setpoint  </property>
    <property> ap/aileron_cmd       </property>
    <property> ap/elevator_cmd      </property>
    <property> ap/airspeed_setpoint </property>
    <property> ap/airspeed_hold     </property>
    <property> ap/throttle-cmd-norm </property>

    <!-- INITIAL GAIN VALUES -->
    <property value="0.5">  ap/hdg-roll-err-c1  </property>
    <property value="50.0"> ap/roll-pid-kp      </property>
    <property value="5.0">  ap/roll-pid-ki      </property>
    <property value="17.0"> ap/roll-pid-kd      </property>

    <!-- =====================================================
         ROLL CHANNEL
         ===================================================== -->

    <!-- Wing leveler -->
    <channel name="Roll wing leveler">
        <sensor name="fcs/attitude/sensor/phi-rad">
            <input> attitude/phi-rad </input>
            <lag> 0.5 </lag>
            <delay> 2 </delay>
            <noise variation="PERCENT" distribution="GAUSSIAN"> 0.05 </noise>
            <quantization name="attitude/sensor/quantized/phi-rad">
                <bits> 12 </bits>
                <min> -3.1416 </min>
                <max>  3.1416 </max>
            </quantization>
            <bias> 0.001 </bias>
        </sensor>

        <switch name="fcs/wing-leveler-ap-on-off">
            <default value="-1"/>
            <test value="0">
                ap/attitude_hold == 1
            </test>
        </switch>

        <pid name="fcs/roll-ap-error-pid">
            <input> attitude/phi-rad </input>
            <kp> ap/roll-pid-kp </kp>
            <ki> ap/roll-pid-ki </ki>
            <kd> ap/roll-pid-kd </kd>
            <trigger> fcs/wing-leveler-ap-on-off </trigger>
        </pid>

        <switch name="fcs/roll-ap-autoswitch">
            <default value="0.0"/>
            <test value="-fcs/roll-ap-error-pid">
                ap/attitude_hold == 1
            </test>
        </switch>
    </channel>

    <!-- Heading hold -->
    <channel name="Roll heading hold">
        <pure_gain name="fcs/heading-true-degrees">
            <input> attitude/heading-true-rad </input>
            <gain> 57.3 </gain> <!-- convert to degrees -->
        </pure_gain>

        <summer name="fcs/heading-error">
            <input> -fcs/heading-true-degrees </input>
            <input> guidance/wp-heading-deg </input>
        </summer>

        <switch name="fcs/heading-error-bias-switch">
            <default value="0.0"/>
            <test value="360.0">  fcs/heading-error lt -180 </test>
            <test value="-360.0"> fcs/heading-error gt 180 </test>
        </switch>

        <summer name="fcs/heading-corrected">
            <input> fcs/heading-error-bias-switch </input>
            <input> fcs/heading-error </input>
            <clipto>
                <min>-33</min>
                <max>33</max>
            </clipto>
        </summer>

        <pure_gain name="fcs/heading-command">
            <input> fcs/heading-corrected </input>
            <gain> 0.02265 </gain>
        </pure_gain>

        <lag_filter name="fcs/heading-roll-error-lag">
            <input> fcs/heading-command </input>
            <c1> ap/hdg-roll-err-c1 </c1>
        </lag_filter>

        <summer name="fcs/heading-roll-error">
            <input> fcs/heading-roll-error-lag </input>
            <input> -attitude/phi-rad </input>
        </summer>

        <switch name="fcs/heading-roll-error-switch">
            <default value="0.0"/>
            <test value="fcs/heading-roll-error">
                ap/heading_hold == 1
            </test>
        </switch>

        <pid name="fcs/heading-pi-controller">
            <input> fcs/heading-roll-error-switch </input>
            <kp> 7.0 </kp>
            <ki> 0.20 </ki>
            <kd> 6.0 </kd>
        </pid>

        <switch name="fcs/roll-command-selector">
            <default value="0.0"/>
            <test value="fcs/heading-pi-controller">
                ap/heading_hold == 1
                gear/unit[2]/WOW == 0
            </test>
            <test value="fcs/roll-ap-autoswitch">
                ap/attitude_hold == 1
                gear/unit[2]/WOW == 0
            </test>
            <output> ap/aileron_cmd </output>
            <clipto>
                <min>-1.0</min>
                <max> 1.0 </max>
            </clipto>
        </switch>
    </channel>

    <!-- =====================================================
         PITCH CHANNEL
         ===================================================== -->

    <channel name="Pitch altitude hold">
        <summer name="fcs/altitude-error">
            <input> ap/altitude_setpoint </input>
            <input> -position/h-agl-ft </input>
            <clipto>
                <min>-150</min>
                <max>150</max>
            </clipto>
        </summer>

        <lag_filter name="fcs/alt-error-lag">
            <input> fcs/altitude-error </input>
            <c1> 1 </c1>
        </lag_filter>

        <scheduled_gain name="fcs/hdot-command">
            <input> fcs/alt-error-lag </input>
            <table>
                <independentVar> position/h-sl-ft </independentVar>
                <tableData>
                    0.0   0.62
                    1000.0   0.61
                    2000.0   0.60
                    3000.0   0.596
                    4000.0   0.493
                    5000.0   0.486
                    6000.0   0.478
                    7000.0   0.469
                    8000.0   0.461
                    9000.0   0.453
                    10000.0   0.445
                    11000.0   0.437
                    12000.0   0.428
                </tableData>
            </table>
        </scheduled_gain>

        <summer name="fcs/hdot-error">
            <input> fcs/hdot-command </input>
            <input> -velocities/h-dot-fps </input>
        </summer>

        <switch name="fcs/ap-alt-hold-switch">
            <default value="0.0"/>
            <test value="fcs/hdot-error">
                ap/altitude_hold == 1
            </test>
        </switch>

        <deadband name="fcs/windup-trigger">
            <input> fcs/elevator-pos-deg </input>
            <width> 46.0 </width>
        </deadband>

        <pid name="fcs/altitude-hold-pid">
            <input> fcs/ap-alt-hold-switch </input>
            <kp> 0.01 </kp>
            <ki> 0.00015 </ki>
            <kd> 0.0023 </kd>
            <trigger> fcs/windup-trigger </trigger>
            <clipto>
                <min>-1.0</min>
                <max> 1.0</max>
            </clipto>
        </pid>

        <pure_gain name="fcs/elevator">
            <input> fcs/altitude-hold-pid </input>
            <gain> -1.0 </gain>
            <output> ap/elevator_cmd </output>
        </pure_gain>
    </channel>

    <channel name="Throttle airspeed hold">
        <summer name="fcs/airspeed-error">
            <input> ap/airspeed_setpoint </input>
            <input> -velocities/vtrue-fps </input>
            <clipto>
                <min>-400.0</min>
                <max> 400.0 </max>
            </clipto>
        </summer>

        <switch name="fcs/airspeed-error-switch">
            <default value="0.0"/>
            <test value="fcs/airspeed-error">
                ap/airspeed_hold == 1
            </test>
        </switch>

        <pid name="fcs/airspeed-hold-pid">
            <input> fcs/airspeed-error-switch </input>
            <kp> 0.3 </kp>
            <ki> 0.0001 </ki>
            <kd> 0.1 </kd>
            <clipto>
                <min> 0.0 </min>
                <max> 1.0 </max>
            </clipto>
        </pid>

        <pure_gain name="fcs/throttle">
            <input> fcs/airspeed-hold-pid </input>
            <gain> 1.0 </gain>
            <output> ap/throttle_cmd </output>
        </pure_gain>
    </channel>

</autopilot>
